// SBML level 2 version 4

function Constant_flux__irreversible(v)
  v;
end
Constant_flux__irreversible is "Constant flux (irreversible)";

function rPhIn(kPhInSk, SK, kPhInFk, FK, Sub)
  (kPhInSk*SK + kPhInFk*FK)*Sub;
end

function rDeSkLi(kDeSkLi, Light, SK)
  kDeSkLi*Light*SK;
end

function rSyS(kSySTf, TF, jInSM, nInSM, M)
  kSySTf*TF*jInSM^nInSM/(jInSM^nInSM + M^nInSM);
end

function rSyIn(kSyIn, V)
  kSyIn/V;
end

model Heldt2019___Chlamydomonas_multiple_fission_cycles()
  // Heldt2019 - Chlamydomonas multiple-fission cycles
  // This model is described in the article:
  // A single light-responsive sizer can control multiple-fission cycles in Chlamydomonas
  // Frank S. Heldt, John J. Tyson, Frederick R. Cross, Bela Novak
  // Abstract:
  // Proliferating cells need to coordinate cell division and growth to maintain size homeostasis. Thus, most eukaryotic cells execute binary division after each mass doubling. By contrast, the photosynthetic green alga Chlamydomonas can grow more than eight-fold during daytime before undergoing rapid cycles of DNA replication, mitosis and cell division at night, which produce up to 16 daughter cells. Here, we propose a mechanistic model for multiple-fission cycles and size control in Chlamydomonas. The model comprises a light-sensitive and size-dependent biochemical toggle switch that acts as a sizer, guarding transitions into and exit from a phase of cell-division cycle oscillations. We show that this simple ‘sizer-oscillator’ arrangement reproduces the experimentally observed features of multiple-fission cycles and the response of Chlamydomonas cells to different light-dark regimes. Our model also makes specific predictions about the size dependence of the time of onset of cell-cycle oscillations after cells are transferred from light to dark conditions, and these predictions are confirmed by single-cell experiments. Collectively, our results provide a new perspective on the concept of a ‘commitment point’ during the growth of Chlamydomonas cells and hint at intriguing similarities of cell-size control in different eukaryotic lineages.

  // Compartments:
  // (AV) cell
  compartment cell = 1;

  // Species:
  // (AU) starter kinase
  substanceOnly species SK in cell = 1;
  // (AU) free (active) transcription factor
  substanceOnly species TF in cell = 0;
  // (AU) free inhibitor
  substanceOnly species IN in cell = 2.6;
  // (AU) inhibitor-transcription factor complex
  substanceOnly species INTF in cell = 1;
  // (AU) phosphorylated (inactive) inhibitor
  substanceOnly species IP in cell = 8.6;
  // (AU) S-phase promoting factor
  substanceOnly species S in cell = 0;
  // (AU) M-phase promoting factor
  substanceOnly species M in cell = 0;
  // (AU) active antagonist
  substanceOnly species $A in cell;
  // (AU) feedback kinase
  substanceOnly species $FK in cell;
  // (AU) total transcription factor
  substanceOnly species $TFt in cell;
  // (AU) total inhibitor
  substanceOnly species $INt in cell;

  // Parameters:
  // (-) binary variable indicating the presence of light
  Light = 1 unit_0;
  // (1/min) specific growth rate (4h mass doubling time)
  mu = 0.0029 unit_1;
  // (AU/AV) total antagonist concentration
  At = 1 unit_2;
  // (AU/AV) cell division threshold (if M falls below CdTh cell division ensues)
  CdTh = 0.2 unit_2;
  // (AU/(AV*min)) starter kinase synthesis
  kSySk = 0.002 unit_3;
  // (1/min) constitutive starter kinase degradation
  kDeSk = 0.002 unit_1;
  // (1/min) light-dependent starter kinase degradation
  kDeSkLi = 0.038 unit_1;
  // (AU/(AV*min)) transcription factor synthesis
  kSyTf = 0.06 unit_3;
  // (1/min) transcription factor degradation
  kDeTf = 0.06 unit_1;
  // (AU/min) inhibitor synthesis
  kSyIn = 6.1 unit_4;
  // (1/min) inhibitor degradation
  kDeIn = 0.5 unit_1;
  // (AV/(AU*min)) association of transcription factor and inhibitor
  kAsTfIn = 500 unit_5;
  // (1/min) dissociation of transcription factor-inhibitor complexes
  kDsTfIn = 0.1 unit_1;
  // (AV/(AU*min)) inhibitor phosphorylation by starter kinase
  kPhInSk = 5.6 unit_5;
  // (AV/(AU*min)) inhibitor phosphorylation by feedback kinase
  kPhInFk = 65 unit_5;
  // (1/min) inhibitor dephosphorylation
  kDpIn = 2 unit_1;
  // (1/min) transcription factor-dependent synthesis of S
  kSySTf = 0.25 unit_1;
  // (AU/AV) half-saturation constant for inhibition of S by M
  jInSM = 0.125 unit_2;
  // (-) hill exponent for inhibition of S by M
  nInSM = 4 unit_0;
  // (1/min) constitutive S degradation
  kDeS = 0.1 unit_1;
  // (1/min) synthesis of M promoted by S
  kSyMS = 0.2 unit_1;
  // (1/min) synthesis of M promoted by M
  kSyMM = 0.06 unit_1;
  // (1/min) constitutive M degradation
  kDeM = 0.1 unit_1;
  // (AV/(AU*min)) antagonist-mediated degradation of M
  kDeMA = 10 unit_5;
  // (AV^n/(AU^n*min)) phosphorylation of antagonist by S
  kPhAS = 25 unit_6;
  // (AV^n/(AU^n*min)) phosphorylation of antagonist by M
  kPhAM = 2000 unit_6;
  // (-) hill exponent for antagonist phosphorylation
  nPhA = 2 unit_0;
  // (1/min) antagonist dephosphorylation
  kDpA = 2 unit_1;

  // Assignment rules:
  A := At*kDpA/(kDpA + kPhAS*(S/cell)^nPhA + kPhAM*(M/cell)^nPhA)*cell;
  TFt := (TF/cell + INTF/cell)*cell;
  FK := TF;
  INt := (IN/cell + INTF/cell + IP/cell)*cell;

  // Rate rules:
  cell' = mu*cell*Light;

  // Reactions:
  Synthesis_of_SK: => SK; cell*Constant_flux__irreversible(kSySk);
  Degradation_of_SK__constitutive: SK => ; kDeSk*SK; Degradation_of_SK__constitutive is "Degradation of SK (constitutive)";
  Degradation_of_SK__light_dependent: SK => ; cell*rDeSkLi(kDeSkLi, Light, SK/cell); Degradation_of_SK__light_dependent is "Degradation of SK (light-dependent)";
  Synthesis_of_TF: => TF; cell*Constant_flux__irreversible(kSyTf);
  Degradation_of_TF: TF => ; kDeTf*TF;
  Degradation_of_TF_in_INTF_complexes: INTF => IN; kDeTf*INTF;
  Synthesis_of_IN: => IN; cell*rSyIn(kSyIn, cell);
  Degradation_of_IN: IN => ; kDeIn*IN;
  Degradation_of_IP: IP => ; kDeIn*IP;
  Degradation_of_IN_in_INTF_complexes: INTF => TF; kDeIn*INTF;
  Synthesis_of_S: => S; cell*rSyS(kSySTf, TF/cell, jInSM, nInSM, M/cell);  // modifiers: TF, M
  Degradation_of_S: S => ; kDeS*S;
  Synthesis_of_M__promoted_by_S: S => S + M; kSyMS*S; Synthesis_of_M__promoted_by_S is "Synthesis of M (promoted by S)";
  Synthesis_of_M__promoted_by_M: M => 2 M; kSyMM*M; Synthesis_of_M__promoted_by_M is "Synthesis of M (promoted by M)";
  Degradation_of_M__constitutive: M => ; kDeM*M; Degradation_of_M__constitutive is "Degradation of M (constitutive)";
  Degradation_of_M__promoted_by_A: $A + M => $A; kDeMA*A*(M/cell); Degradation_of_M__promoted_by_A is "Degradation of M (promoted by A)";
  Association_dissociation_of_IN_and_TF: IN + TF -> INTF; cell*(kAsTfIn*(IN/cell)*(TF/cell) - kDsTfIn*(INTF/cell)); Association_dissociation_of_IN_and_TF is "Association/dissociation of IN and TF";
  Phosphorylation_of_IN: IN => IP; cell*rPhIn(kPhInSk, SK/cell, kPhInFk, FK/cell, IN/cell);  // modifiers: SK, FK
  Phosphorylation_of_INTF: INTF => TF + IP; cell*rPhIn(kPhInSk, SK/cell, kPhInFk, FK/cell, INTF/cell);  // modifiers: SK, FK
  Desphosphorylation_of_IP: IP => IN; kDpIn*IP;

  // Events:
  Division: at (M/cell <= CdTh): cell = cell/2, SK = SK/cell/2*cell, TF = TF/cell/2*cell, IN = IN/cell/2*cell, INTF = INTF/cell/2*cell, IP = IP/cell/2*cell, S = S/cell/2*cell, M = M/cell/2*cell;
  Dark_shift: at (piecewise(time - 720 - 1440*ceil((time - 720)/1440), xor(time - 720 < 0, 1440 < 0), time - 720 - 1440*floor((time - 720)/1440)) == 0): Light = 0;
  Light_shift: at (piecewise(time - 1440*ceil(time/1440), xor(time < 0, 1440 < 0), time - 1440*floor(time/1440)) == 0): Light = 1;

  // Unit definitions:
  unit volume = 1e-3 litre;
  unit time = 60 second;
  unit substance = item;
  unit unit_0 = dimensionless^0; unit_0 is "1";
  unit unit_1 = 1 / (0.06 second); unit_1 is "1/min";
  unit unit_2 = (0.02 dimensionless)^0 * item / volt; unit_2 is "AU/AV";
  unit unit_3 = (0.02 dimensionless)^0 * item / (0.06 second * volt); unit_3 is "AU/(AV*min)";
  unit unit_4 = (0.02 dimensionless)^0 * item / (0.06 second); unit_4 is "AU/min";
  unit unit_5 = volt * (0.02 dimensionless)^0 / (0.06 second * item); unit_5 is "AV/(AU*min)";
  unit unit_6 = volt^2 * (0.02 dimensionless)^0 / (0.06 second * item^2); unit_6 is "AV^2/(AU^2*min)";
end
